// SBML level 3 version 1

model Stochastic()
  // model units - substance: substance, time: time_unit, volume: volume

  // Compartments:
  compartment Cytoplasm = 3000 volume;
  compartment Nucleus = 1000 volume;

  // Species:
  species nuc_gene_a__LIGAND_ in Nucleus = 1;
  species nuc_gene_i__LIGAND_ in Nucleus = 1;
  species nuc_gene_a__RECEPTOR_ in Nucleus = 1;
  species nuc_gene_i__RECEPTOR_ in Nucleus = 1;
  species cyt_mrna__LIGAND_ in Cytoplasm = 10;
  species cyt_mrna__RECEPTOR_ in Cytoplasm = 10;

  // Parameters:
  kGac1_1 = 0.0005;
  kGac2_1 = 0.0005;
  kGin1_1 = 0.005;
  kGin2_1 = 0.005;
  kTC1_1 = 5e-6;
  kTC2_1 = 5e-6;
  kTCd1_1 = 5e-5;
  kTCd2_1 = 5e-5;
  cyt_prot__LIGAND_ = 20;
  cyt_prot__RECEPTOR_ = 100;
  cyt_prot__LIGAND__RECEPTOR_ = 0;
  kTL1_1 = 1;
  kTL2_1 = 1;
  kLR1_1 = 0.01;
  kLR2_1 = 0.01;

  // Reactions:
  vGac1: nuc_gene_i__LIGAND_ => nuc_gene_a__LIGAND_; kGac1_1*nuc_gene_i__LIGAND_*Nucleus;
  vGac2: nuc_gene_i__RECEPTOR_ => nuc_gene_a__RECEPTOR_; kGac2_1*nuc_gene_i__RECEPTOR_*Nucleus;
  vGin1: nuc_gene_a__LIGAND_ => nuc_gene_i__LIGAND_; kGin1_1*nuc_gene_a__LIGAND_*Nucleus;
  vGin2: nuc_gene_a__RECEPTOR_ => nuc_gene_i__RECEPTOR_; kGin2_1*nuc_gene_a__RECEPTOR_*Nucleus;
  vTC1: => cyt_mrna__LIGAND_; kTC1_1*Nucleus;
  vTC2: => cyt_mrna__RECEPTOR_; kTC2_1*Nucleus;
  vTCd1: cyt_mrna__LIGAND_ => ; kTCd1_1*Nucleus;
  vTCd2: cyt_mrna__RECEPTOR_ => ; kTCd2_1*Cytoplasm;

  // Unit definitions:
  unit volume = litre;
  unit time_unit = second;
  unit substance = 1e-9 mole;
  unit nM = 1e-9 mole / litre;
end
